<?xml version="1.0"?>
<piston_engine name="Continental-O-470-M">
	<minmp unit="INHG">8</minmp>
	<maxmp unit="INHG">29.92</maxmp>
	<maxhp>240</maxhp>
	<cycles>4</cycles>
	<idlerpm>500</idlerpm>
	<maxrpm>2600</maxrpm>
	<sparkfaildrop>0.1</sparkfaildrop>
	<man-press-lag>1</man-press-lag>
	<static-friction unit="HP">2</static-friction>
	<starter-torque>200</starter-torque>
	<starter-rpm>800</starter-rpm>
	<!--<bsfc>0.9713</bsfc>
	<volumetric-efficiency>0.85</volumetric-efficiency>-->
	<stroke unit="IN">4</stroke>
	<bore unit="IN">5</bore>
	<displacement unit="IN3">471</displacement>
	<cylinders>6</cylinders>
	<compression-ratio>7</compression-ratio>
</piston_engine>
