<?xml version="1.0"?>
<?xml-stylesheet type="text/xsl" href="http://jsbsim.sourceforge.net/JSBSim.xsl"?>
<fdm_config xmlns:xsi="http://www.w3.org/2001/XMLSchema-instance" name="c310" version="2.0" release="ALPHA" xsi:noNamespaceSchemaLocation="http://jsbsim.sourceforge.net/JSBSim.xsd">
	<fileheader>
		<author> AeromatiC++ version 3.3.20 </author>
		<filecreationdate> 21 May 2022 </filecreationdate>
		<version>$Revision: 1.80 $</version>
		<description> Models a c310. </description>
	</fileheader>
	<!--
  File:     c310.xml
  Inputs:
    name:          c310
    type:          Multi-engine Glider, Small Commuter
    stall speed:   73.00 kt
    max weight:    5400.00 lbs
    length:        27.00 ft
    wing:
     span:         35.00 ft
     area:         175.00 ft2
     mean chord:   4.06 ft
     aspect ratio: 7.78:1
     taper ratio:  0.67:1
     incidence:    2.50 degrees
     dihedral:     5.00 degrees
     sweep:        0.00 degrees

    no. engines:   2
    engine type:   Piston Engine
    engine layout: wings

    gear type:     tricycle
    steering type: steering
    retractable?:  yes

  Outputs:
    wing loading:       30.86 lbs/sq-ft
     - thickness ratio: 7.24%
    payload:            1561.80 lbs
    CL-alpha:           5.24 per radian
    CL-0:               0.35
    CL-max:             1.71
    CD-0:               0.02
    K:                  0.04
    Mcrit:              0.72

    min. turn radius    260.48 ft
    max. turn rate:     0.52 deg/s
-->
	<metrics>
		<wingarea unit="FT2">   175.00 </wingarea>
		<wingspan unit="FT">    35.00 </wingspan>
		<wing_incidence unit="DEG"> 2.50 </wing_incidence>
		<chord unit="FT">     4.06 </chord>
		<htailarea unit="FT2">    28.00 </htailarea>
		<htailarm unit="FT">    13.50 </htailarm>
		<vtailarea unit="FT2">   31.50 </vtailarea>
		<vtailarm unit="FT">    13.50 </vtailarm>
		<location name="AERORP" unit="FT">
			<x>    13.50 </x>
			<y>     0.00 </y>
			<z>     0.00 </z>
		</location>
		<location name="EYEPOINT" unit="FT">
			<x>     4.59 </x>
			<y>    -1.50 </y>
			<z>     3.75 </z>
		</location>
		<location name="VRP" unit="FT">
			<x>     0.0 </x>
			<y>     0.0 </y>
			<z>     0.0 </z>
		</location>
	</metrics>

	<mass_balance>
		<ixx unit="SLUG*FT2">   8884.00 </ixx>
		<iyy unit="SLUG*FT2">   1939.00 </iyy>
		<izz unit="SLUG*FT2">  11001.00 </izz>
		<emptywt unit="LBS">   2850.00 </emptywt>
		<location name="CG" unit="FT">
			<x>    13.12 </x>
			<y>     0.00 </y>
			<z>    -0.68 </z>
		</location>

		<pointmass name="Payload">
			<description> 1561.80 lbs should bring model up to entered max weight </description>
			<weight unit="LBS"> 780.90 </weight>
			<location name="POINTMASS" unit="FT">
				<x>    13.12 </x>
				<y>     0.00 </y>
				<z>    -0.68 </z>
			</location>
		</pointmass>
	</mass_balance>

	<propulsion>
		<engine file="O-470-B">
			<location unit="FT">
				<x>    13.12 </x>
				<y>    -5.83 </y>
				<z>    -3.33 </z>
			</location>
			<orient unit="DEG">
				<pitch>     0.00 </pitch>
				<roll>     0.00 </roll>
				<yaw>     0.00 </yaw>
			</orient>
			<feed> 0 </feed>

			<thruster file="Propeller">
				<sense> 1 </sense>
				<location unit="FT">
					<x>    13.12 </x>
					<y>    -5.83 </y>
					<z>    -3.33 </z>
				</location>
				<orient unit="DEG">
					<pitch>     0.00 </pitch>
					<roll>     0.00 </roll>
					<yaw>     0.00 </yaw>
				</orient>
			</thruster>
		</engine>

		<engine file="O-470-B">
			<location unit="FT">
				<x>    13.12 </x>
				<y>     5.83 </y>
				<z>    -3.33 </z>
			</location>
			<orient unit="DEG">
				<pitch>     0.00 </pitch>
				<roll>     0.00 </roll>
				<yaw>     0.00 </yaw>
			</orient>
			<feed> 1 </feed>

			<thruster file="Propeller">
				<sense> 1 </sense>
				<location unit="FT">
					<x>    13.12 </x>
					<y>     5.83 </y>
					<z>    -3.33 </z>
				</location>
				<orient unit="DEG">
					<pitch>     0.00 </pitch>
					<roll>     0.00 </roll>
					<yaw>     0.00 </yaw>
				</orient>
			</thruster>
		</engine>

		<tank type="FUEL" number="0">
			<location unit="FT">
				<x>    13.12 </x>
				<y>     0.00 </y>
				<z>    -0.68 </z>
			</location>
			<capacity unit="LBS"> 329.40 </capacity>
			<contents unit="LBS"> 164.70 </contents>
		</tank>

		<tank type="FUEL" number="1">
			<location unit="FT">
				<x>    13.12 </x>
				<y>     0.00 </y>
				<z>    -0.68 </z>
			</location>
			<capacity unit="LBS"> 329.40 </capacity>
			<contents unit="LBS"> 164.70 </contents>
		</tank>

		<tank type="FUEL" number="2">
			<location unit="FT">
				<x>    13.12 </x>
				<y>     0.00 </y>
				<z>    -0.68 </z>
			</location>
			<capacity unit="LBS"> 329.40 </capacity>
			<contents unit="LBS"> 164.70 </contents>
		</tank>
	</propulsion>

	<ground_reactions>
		<contact type="BOGEY" name="NOSE">
			<location unit="FT">
				<x>     3.51 </x>
				<y>     0.00 </y>
				<z>    -3.24 </z>
			</location>
			<static_friction>  0.80 </static_friction>
			<dynamic_friction> 0.50 </dynamic_friction>
			<rolling_friction> 0.02 </rolling_friction>
			<spring_coeff unit="LBS/FT">     1620.00 </spring_coeff>
			<damping_coeff unit="LBS/FT/SEC"> 810.00 </damping_coeff>
			<max_steer unit="DEG"> 5.00 </max_steer>
			<brake_group> NONE </brake_group>
			<retractable> 1 </retractable>
		</contact>
		<contact type="BOGEY" name="LEFT_MAIN">
			<location unit="FT">
				<x>    13.65 </x>
				<y>    -3.15 </y>
				<z>    -3.24 </z>
			</location>
			<static_friction>  0.80 </static_friction>
			<dynamic_friction> 0.50 </dynamic_friction>
			<rolling_friction> 0.02 </rolling_friction>
			<spring_coeff unit="LBS/FT">     5400.00 </spring_coeff>
			<damping_coeff unit="LBS/FT/SEC"> 2700.00 </damping_coeff>
			<max_steer unit="DEG">0</max_steer>
			<brake_group> LEFT </brake_group>
			<retractable> 1 </retractable>
		</contact>
		<contact type="BOGEY" name="RIGHT_MAIN">
			<location unit="FT">
				<x>    13.65 </x>
				<y>     3.15 </y>
				<z>    -3.24 </z>
			</location>
			<static_friction>  0.80 </static_friction>
			<dynamic_friction> 0.50 </dynamic_friction>
			<rolling_friction> 0.02 </rolling_friction>
			<spring_coeff unit="LBS/FT">     5400.00 </spring_coeff>
			<damping_coeff unit="LBS/FT/SEC"> 2700.00 </damping_coeff>
			<max_steer unit="DEG">0</max_steer>
			<brake_group> RIGHT </brake_group>
			<retractable> 1 </retractable>
		</contact>
		<contact type="STRUCTURE" name="LEFT_WING">
			<location unit="FT">
				<x>    13.12 </x>
				<y>   -17.50 </y>
				<z>    -0.68 </z>
			</location>
			<static_friction>  1 </static_friction>
			<dynamic_friction> 1 </dynamic_friction>
			<spring_coeff unit="LBS/FT">     5400.00 </spring_coeff>
			<damping_coeff unit="LBS/FT/SEC"> 2700.00 </damping_coeff>
		</contact>
		<contact type="STRUCTURE" name="RIGHT_WING">
			<location unit="FT">
				<x>    13.12 </x>
				<y>    17.50 </y>
				<z>    -0.68 </z>
			</location>
			<static_friction>  1 </static_friction>
			<dynamic_friction> 1 </dynamic_friction>
			<spring_coeff unit="LBS/FT">     5400.00 </spring_coeff>
			<damping_coeff unit="LBS/FT/SEC"> 2700.00 </damping_coeff>
		</contact>
	</ground_reactions>

	<flight_control file="Systems/fdm-fcs.xml"/>

	<aerodynamics file="Systems/fdm-aerodynamics.xml"/>

	<external_reactions>
	</external_reactions>
</fdm_config>
